# OpenSim document version 30000
ForwardTool osim:
  replace_force_set: false
  results_directory: C:\Users\EACE-Precision-1\Google Drive\WORK\PROJECTS\AnkleSprains\code\git\anklesprain\osim_output
  output_precision: 8
  initial_time: 0
  final_time: 0.15
  solve_for_equilibrium_for_auxiliary_states: true
  maximum_number_of_integrator_steps: 20000
  maximum_integrator_step_size: 1
  minimum_integrator_step_size: 1e-8
  integrator_error_tolerance: 1e-5
  states_file: C:\Users\EACE-Precision-1\Google Drive\WORK\PROJECTS\AnkleSprains\code\git\anklesprain\osim_output\osim_initialState.sto
  use_specified_dt: false
  AnalysisSet Analyses:
    ForceReporter: start_time=0 end_time=0.15 step_interval=1 in_degrees=true include_constraint_forces=true
    Kinematics: start_time=0 end_time=0.15 step_interval=1 in_degrees=true
    Actuation: start_time=0 end_time=0.15 step_interval=1 in_degrees=true
    JointReaction: start_time=0 end_time=0.15 step_interval=1 in_degrees=true
        joint_names=(knee_r ankle_r subtalar_r hip_r) apply_on_bodies=child express_in_frame=child
    BodyKinematics: start_time=0 end_time=0.15 step_interval=1 in_degrees=true bodies=(tibia_r talus_r calcn_r)
        express_results_in_body_local_frame=false
