# OpenSim document version 30000
ControllerSet Controllers:
  MuscleFiberStretchController rightHipStretchController: actuator_list=(glut_max1_r glut_max2_r glut_max3_r iliacus_r psoas_r sar_r add_brev_r add_long_r add_mag1_r add_mag2_r add_mag3_r grac_r pect_r glut_med1_r glut_med2_r glut_med3_r glut_min1_r glut_min2_r glut_min3_r tfl_r peri_r quad_fem_r gem_r)
      gain_length=0.7401981 gain_velocity=0.9832258 normalized_rest_length=1.14479
  MuscleFiberStretchController rightKneeStretchController: actuator_list=(rect_fem_r vas_int_r vas_lat_r vas_med_r bifemlh_r bifemsh_r semimem_r semiten_r)
      gain_length=1.293049 gain_velocity=0.373327 normalized_rest_length=0.7311872
  MuscleFiberStretchController rightPlantarFlexorStretchController: actuator_list=(lat_gas_r med_gas_r soleus_r)
      gain_length=1.371719 gain_velocity=0.006808503 normalized_rest_length=0.5627824
  MuscleFiberStretchController rightDorsiflexorStretchController: actuator_list=tib_ant_r gain_length=0.5987092
      gain_velocity=1.407639 normalized_rest_length=0.5747888
  MuscleFiberStretchController OtherStretchController: actuator_list=(ercspn_r ercspn_l intobl_r intobl_l extobl_r extobl_l)
      gain_length=1.20705 gain_velocity=0.9079357 normalized_rest_length=1.000673
