# OpenSim document version 30000
ForwardTool fwd:
  replace_force_set: false
  results_directory: results
  output_precision: 8
  initial_time: 0
  final_time: 0.25
  solve_for_equilibrium_for_auxiliary_states: true
  maximum_number_of_integrator_steps: 20000
  maximum_integrator_step_size: 1
  minimum_integrator_step_size: 1e-8
  integrator_error_tolerance: 1e-5
  states_file: Right_SLD_mean_states.sto
  use_specified_dt: false
  AnalysisSet Analyses:
    ForceReporter: start_time=0 end_time=0.25 step_interval=1 in_degrees=true include_constraint_forces=false
    BodyKinematics: start_time=0 end_time=0.25 step_interval=1 in_degrees=true bodies=all
        express_results_in_body_local_frame=false
    Kinematics: start_time=0 end_time=0.25 step_interval=1 in_degrees=true
    JointReaction: start_time=0 end_time=0.25 step_interval=1 in_degrees=true joint_names=ALL apply_on_bodies=child
        express_in_frame=ground
    Actuation: start_time=0 end_time=0.25 step_interval=1 in_degrees=true
